** =========================================================================================
** Nodes (*Node)
** =========================================================================================
*Node
    1,        0,        0,        0
    2,        0,       10,        0
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** =========================================================================================
** Elements (*Element)
** =========================================================================================
*Element, Type = CPE8
   87,        2,       26,       86,       65,      466,      533,      534,      507
   88,       65,       86,       87,       66,      534,      535,      536,      508
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** =========================================================================================
** Node Sets (*Nset)
** =========================================================================================
*Nset, Nset = nodes_foundation_top
6,  7,  83,  84,  85,  529,  530,  531,  532
** -----------------------------------------------------------------------------------------
*Nset, Nset = nodes_boundary_right
3,  4,  46,  47,  48,  49
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** -----------------------------------------------------------------------------------------
*Nset, Nset = nodes_boundary_bottom
1,  3,  27,  28,  29,  30
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** -----------------------------------------------------------------------------------------
*Nset, Nset = nodes_boundary_left
1,  2,  8,  9,  10,  11
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** -----------------------------------------------------------------------------------------
*Nset, Nset = nodes_foundation_left
1296, 6, 527
** ----------------
*Nset, Nset = soil_all
1,  2,  3,  4,  5,  8
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** -----------------------------------------------------------------------------------------
** =========================================================================================
** Element Sets (*Elset)
** =========================================================================================
*Elset, Elset = soil_all
87,  88,  89,  90,  91,  92
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** -----------------------------------------------------------------------------------------
*Elset, Elset = foundation_all
487,  488,  489,  490
*Surface, name = foundation_bottom
foundation_all, S2
** --------------------------------------------------------------------
*Elset, Elset = soil_top
87, 88, 89, 90, 91
*Surface, name=soil_top
soil_top, S4
** -----------------------------------------------------------------------------------------
*Elset, Elset = all
87,  88,  89,  90,  91,  92
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** --------------------------------------------------------------------
*Surface INTERACTION,name=penalty
1
**surface behavior, penalty
**2d5
**0.0000001d0,0.1d0
*Contact Pair,interaction=penalty,type=surface to surface
soil_top, foundation_bottom
** -----------------------------------------------------------------------------------------
** =========================================================================================
** Solid section and step definition
** =========================================================================================
** Soil
*SOLID SECTION, ELSET=soil_all, MATERIAL=soil
**---------------------------------- Materials --------------------------------------
**
*material, name = elastic
*Elastic
5000000000, 0.3
*Density
0.5
**
*material, name = soil
*Density
1.6,
*Depvar
    50,
*User Material, constants=15, unsymm
 0.578,     0.37,    4e+06,     0.27,    0.677,    1.054,    1.212,     0.14
      2.5,      1.2,      2.4,   0.0001,      0.1,       6.,       0.
**
**
** Foundation
*SOLID SECTION, ELSET=foundation_all, MATERIAL=concrete
*MATERIAL, NAME=concrete
*DENSITY
0.001
*Elastic
30000000.0, 0.3
*********************************************************************
*INITIAL CONDITIONS, TYPE=STRESS, GEOSTATIC
soil_all, 0,10 ,-160.0d0,0 , 0.5, 0.5
**
***********************************************************************
*INITIAL CONDITIONS, TYPE=SOLUTION,USER
***********************************************************************
*Amplitude, name=Sinusfunktion, definition=PERIODIC
1,         6.28319,              0.,              0.
0.,              1.
*amplitude,name=direkt
0,1,1,1
*********************************************************************
***************************** STEP 1 ********************************
*********************************************************************
*STEP, NAME=Step1, inc= 1
*GEOStatic
*DLOAD
all, GRAV, 10.0d0, 0,-1,0
*BOUNDARY
nodes_boundary_left, 1,1, 0.0d0
nodes_foundation_left, 1,1, 0.0d0
nodes_foundation_left, 2,2, 0.0d0
nodes_boundary_right, 1,1, 0.0d0
nodes_boundary_bottom, 2,2, 0.0d0
*controls,parameters=field,field=displacement
0.15,0.06
*END STEP
**********************************************************************
**************************** STEP 2 **********************************
**********************************************************************
*STEP, NAME=Step2, INC=20000
*STATIC
0.1, 1.0, 0.001, 0.1
*BOUNDARY,op=new
nodes_boundary_left, 1,1, 0.0d0
nodes_foundation_left, 1,1, 0.0d0
nodes_boundary_right, 1,1, 0.0d0
nodes_boundary_bottom, 2,2, 0.0d0
*DLOAD
foundation_all, P4, 10d0
*controls,parameters=field,field=displacement
0.15,0.06
*END STEP
**********************************************************************
**************************** STEP 2 **********************************
**********************************************************************
*STEP, NAME=Step3, INC=20000
*STATIC
0.1, 1.0, 0.001, 0.1
*DLOAD,op=new,Amplitude=direkt
all, GRAV, 10.0d0, 0,-1,0
*DLOAD,Amplitude=direkt,op=new
foundation_all, P4, 10d0
*DLOAD, Amplitude=Sinusfunktion,op=new
foundation_all, P4, 3d0
*controls,parameters=field,field=displacement
0.15,0.06
*END STEP
**********************************************************************
**************************** STEP 2 **********************************
**********************************************************************
*STEP, NAME=Step4, INC=20000
*STATIC
1, 1.0, 0.001, 1
*DLOAD,op=new,Amplitude=direkt
all, GRAV, 10.0d0, 0,-1,0
*DLOAD,Amplitude=direkt,op=new
foundation_all, P4, 10d0
**
*Output, field
*Node Output
U
*Element Output
S,E,SDV
***********
*controls,parameters=field,field=displacement
0.15,0.06
*end step
**
*STEP, NAME=Step5, INC=20000
*STATIC
0.01, 1000000.0, 0.001, 10000
*DLOAD,op=new,Amplitude=direkt
all, GRAV, 10.0d0, 0,-1,0
*DLOAD,Amplitude=direkt,op=new
foundation_all, P4, 10d0
**
*Output, field
*Node Output
U
*Element Output
S,E,SDV
***********
*controls,parameters=field,field=displacement
0.15,0.06
*end step
